units lj
dimension 3
boundary p p f

processors 2 2 *

atom_style hybrid angle mdpd
neighbor 0.3 bin
neigh_modify every 1 delay 0 check yes
comm_modify vel yes cutoff 2.0

region        box  block -20 20 -20 20 0 30 units box
create_box    1    box

mass 1 1

region        layer   block  INF INF INF INF 2 4.5


variable Radius equal 6

region        drop   sphere 0 0 9 v_Radius
create_atoms  1 random $(round(6.9*4/3*PI*v_Radius^3)) 2021 drop

###########################################################
# Pair, Bond and Angle Coefficients

pair_style hybrid/overlay mdpd/rhosum mdpd 1.0 1.0 65689
pair_coeff  *  *   mdpd/rhosum  0.75

pair_coeff  1  1   mdpd  -50.0  25.0  4.5  1.0  0.75

###########################################################

compute             mythermo all temp
thermo              100
thermo_modify       temp mythermo
thermo_modify       flush yes

dump 2 all atom 100 moving-tilt1.lammpstrj

min_style cg
minimize 1e-4 1e-4 1000 10000

fix         mvv     all mvv/dpd 0.65
timestep 0.01
run 1000

fix wallhi all wall/harmonic zhi 29 100 0.5 1.0 units box
fix walllo all wall/lj93 zlo 3 5.0 0.5 1.0 units box

min_style cg
minimize 1e-4 1e-4 1000 10000

run 6000

print  "$(step), $(time)"

group movingLayer dynamic all region layer every 1

run 0 # Necessary to add atoms to the dynamic group 'move'

# velocity movingLayer set 0 0.01 0 sum yes

fix f1 movingLayer addforce 0 -.005 0
fix f2 all addforce 0 .005 -.005


run 60000
